*INCLUDE, INPUT=Product2_ccxmsh.inp
*INCLUDE, INPUT=material.inp
*BOUNDARY
inlet_end_1,1,6,0
*INITIAL CONDITIONS,TYPE=TEMPERATURE
Nall,20
*STEP
*STATIC
*INCLUDE, INPUT=load.inp
*NODE FILE,OUTPUT=3D
U, NT
*EL FILE
S
*END STEP
